Tue 09/01/2020
11:09 AM
;; 1. Based on: run56
;; 2. Description: Final model
;; x1. Author: user
;; Including all data along with rich datset
;; 3. Label:
;;
;; 4. Structural model:
;; 2 CMT, IV administration
;; 5. Covariate model:
;; WT on V1 (both), WT on CL (IP), CRCL on CL (both) & HLTH on V1 (IP)
;; 6. Interindividual variability:
;; IIV on CL & V1 & V2 (Both analytes), covariance on CL & V1 (Both analytes)
;; 7. Interoccasion variability:
;; None
;; 8. Residual variability:
;; Proportional (both analytes)
;; 9. Estimation:
;; FO + I
;;
$PROBLEM    MK-7655A Population PK Analysis
;;

;; Sponsor: Merck

;; Project: MK-7655A

;; Analyst: Kenny Watson / Parul Patel

;;

;; ------------------------------------------------------------------------------------------------------------------
$INPUT      C NROW PN PID ID PART PANL PERD GRP SDMD COAD DRUG DOSE
            DAY RNTM TIME TSLD DV MDV EVID AMT RATE ADDL II CMT=DROP
            CRCL RENL WT WTBN AGE MALE HLTH HT RACE SECR RICH INFC TRT
; AMT = nmol; DV = nmol/L; TIME = h

; CL and Q = L/hr; V1 & V2 = L
$DATA      PSP4-8-748-s012.csv IGNORE=@
$SUBROUTINE ADVAN3 TRANS4
;
$PK
;;; V1_RLWT-DEFINITION START
IF(WT.EQ.-99) THEN
 V1_RLWT = 1
ELSE
 V1_RLWT = ((WT/76)**THETA(14))
ENDIF
;;; V1_RLWT-DEFINITION END

;;; V1_RL-RELATION START
V1_RLCOV=V1_RLWT
;;; V1_RL-RELATION END

;;; V1_IPWT-DEFINITION START
IF(WT.EQ.-99) THEN
 V1_IPWT = 1
ELSE
 V1_IPWT = ((WT/76)**THETA(13))
ENDIF
;;; V1_IPWT-DEFINITION END

;;; V1_IPHLTH-DEFINITION START
IF(HLTH.EQ.0) V1_IPHLTH = 1 ; Most common
IF(HLTH.EQ.1) V1_IPHLTH = ( 1 + THETA(12))
;;; V1_IPHLTH-DEFINITION END

;;; V1_IP-RELATION START
V1_IPCOV=V1_IPHLTH*V1_IPWT
;;; V1_IP-RELATION END

;;; CL_RLCRCL-DEFINITION START
IF(CRCL.EQ.-99) THEN
 CL_RLCRCL = 1
ELSE
 CL_RLCRCL = ((CRCL/109)**THETA(11))
ENDIF
;;; CL_RLCRCL-DEFINITION END

;;; CL_RL-RELATION START
CL_RLCOV=CL_RLCRCL
;;; CL_RL-RELATION END

;;; CL_IPWT-DEFINITION START
IF(WT.EQ.-99) THEN
 CL_IPWT = 1
ELSE
 CL_IPWT = ((WT/76)**THETA(10))
ENDIF
;;; CL_IPWT-DEFINITION END

;;; CL_IPCRCL-DEFINITION START
IF(CRCL.EQ.-99) THEN
 CL_IPCRCL = 1
ELSE
 CL_IPCRCL = ((CRCL/109)**THETA(9))
ENDIF
;;; CL_IPCRCL-DEFINITION END

;;; CL_IP-RELATION START
CL_IPCOV=CL_IPCRCL*CL_IPWT
;;; CL_IP-RELATION END

; Imipenem PK parameters
 TVCL_IP = THETA(1)
TVCL_IP = CL_IPCOV*TVCL_IP
 TVV1_IP = THETA(2)
TVV1_IP = V1_IPCOV*TVV1_IP
 TVV2_IP = THETA(3)
 TVQ_IP = THETA(4)
 CL_IP = TVCL_IP*EXP(ETA(1))
 V1_IP = TVV1_IP*EXP(ETA(2))
 V2_IP = TVV2_IP*EXP(ETA(3))
 Q_IP = TVQ_IP*EXP(ETA(4))

; MK-7655 parameters
 TVCL_RL = THETA(5)
TVCL_RL = CL_RLCOV*TVCL_RL
 TVV1_RL = THETA(6)
TVV1_RL = V1_RLCOV*TVV1_RL
 TVV2_RL = THETA(7)
 TVQ_RL = THETA(8)
 CL_RL = TVCL_RL*EXP(ETA(5))
 V1_RL = TVV1_RL*EXP(ETA(6))
 V2_RL = TVV2_RL*EXP(ETA(7))
 Q_RL = TVQ_RL*EXP(ETA(8))
 IF(DRUG.EQ.1) THEN
 CL = CL_IP
 V1 = V1_IP
 V2 = V2_IP
 Q = Q_IP
 S1 = V1_IP
 ELSE
 CL = CL_RL
 V1 = V1_RL
 V2 = V2_RL
 Q = Q_RL
 S1 = V1_RL
 ENDIF
;
$ERROR
;
 DEL=0
 IF (F.LE.0.0001) DEL=1
 IPRED=F
 W1= 1
 W2= F
 IRES= DV-IPRED
 IWRES=(1-DEL)*IRES/(W1+W2+DEL)
;
 X1=0
 X2=0
;
IF (DRUG.EQ.1) X1=1
IF (DRUG.EQ.2) X2=1
RV_IP = X1*(F*(1+ERR(1)) + ERR(2))
RV_MK = X2*(F*(1+ERR(3)) + ERR(4))
Y = RV_IP + RV_MK
;
;
$THETA  (0,11.7) ; [TVCL_IP] (L/h)
$THETA  (0,14.5) ; [TVV1_IP] (L)
$THETA  (0,6.3) ; [TVV2_IP] (L)
$THETA  (0,11.1) ; [TVQ_IP] (L/h)
$THETA  (0,6.52) ; [TVCL_RL] (L/h)
$THETA  (0,11.1) ; [TVV1_RL] (L)
$THETA  (0,6.65) ; [TVV2_RL] (L)
$THETA  (0,10.3) ; [TVQ_RL] (L/h)
$THETA  (0,0.5,2.00) ; CL_IPCRCL1
$THETA  (0,1,2.00) ; CL_IPWT1
$THETA  (0,0.5,2.00) ; CL_RLCRCL1
$THETA  (-1,-0.001,5) ; V1_IPHLTH1
$THETA  (0,1,2.00) ; V1_IPWT1
$THETA  (0,1,2.00) ; V1_RLWT1
$OMEGA  BLOCK(2)
 0.306  ; [BSV_CL_IP]
 0.103  ; [CORR_CL_V1_IP]
 0.599  ; [BSV_V1_IP]
$OMEGA  0.126  ; [BSV_V2_IP]
 0  FIX  ; [BSV_Q_IP]
$OMEGA  BLOCK(2)
 0.351  ; [BSV_CL_RL]
 0.103  ; [CORR_CL_V1_RL]
 0.328  ; [BSV_V1_RL]
$OMEGA  0.168  ; [BSV_V2_RL]
 0  FIX  ; [BSV_Q_RL]
$SIGMA  0.025  ; [RES_prop_IP]
$SIGMA  0  FIX  ; [RES_add_IP]
$SIGMA  0.0223  ; [RES_prop_RL]
$SIGMA  0  FIX  ; [RES_add_RL]
$ESTIMATION METHOD=1 INTER MAXEVAL=9999 PRINT=5 SIG=3 MSFO=55.MSF
;
$COVARIANCE PRINT=E
$TABLE      PN PID ID PART PANL PERD GRP SDMD COAD DRUG DOSE DAY RNTM
            TIME TSLD CRCL RENL WT WTBN AGE MALE HLTH HT RACE SECR
            RICH NROW CWRES TRT ONEHEADER NOPRINT FORMAT=s1PE13.7
            FILE=mytab60
;
$TABLE      ID NROW PN DRUG DOSE DAY RNTM TIME TSLD IPRED IRES IWRES
            CWRES DV ONEHEADER NOPRINT FORMAT=s1PE13.7 FILE=sdtab60
$TABLE      ID CL_IP V1_IP Q_IP V2_IP CL_RL V1_RL Q_RL V2_RL ETA1 ETA2
            ETA3 ETA4 ETA5 ETA6 ETA7 ETA8 NOAPPEND ONEHEADER NOPRINT
            FORMAT=s1PE13.7 FILE=patab60
$TABLE      ID MALE HLTH RENL WTBN RACE ONEHEADER NOPRINT NOAPPEND
            FORMAT=s1PE13.7 FILE=catab60
$TABLE      ID CRCL WT AGE HT SECR NOAPPEND ONEHEADER NOPRINT
            FORMAT=s1PE13.7 FILE=cotab60
;

NM-TRAN MESSAGES
 WARNINGS AND ERRORS (IF ANY) FOR PROBLEM    1
 (WARNING  2) NM-TRAN INFERS THAT THE DATA ARE POPULATION.

1NONLINEAR MIXED EFFECTS MODEL PROGRAM (NONMEM) VERSION 7.4.1
 ORIGINALLY DEVELOPED BY STUART BEAL, LEWIS SHEINER, AND ALISON BOECKMANN
 CURRENT DEVELOPERS ARE ROBERT BAUER, ICON DEVELOPMENT SOLUTIONS,
 AND ALISON BOECKMANN. IMPLEMENTATION, EFFICIENCY, AND STANDARDIZATION
 PERFORMED BY NOUS INFOSYSTEMS.
 PROBLEM NO.:         1
 MK-7655A Population PK Analysis
 TOT. NO. OF OBS RECS:     9261
 TOT. NO. OF INDIVIDUALS:      893
 TWO COMPARTMENT MODEL (ADVAN3)
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 #TBLN:      1
 #METH: First Order Conditional Estimation with Interaction
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
 #TERM:
0MINIMIZATION SUCCESSFUL
 NO. OF FUNCTION EVALUATIONS USED:      897
 NO. OF SIG. DIGITS IN FINAL EST.:  3.8

 ETABAR IS THE ARITHMETIC MEAN OF THE ETA-ESTIMATES,
 AND THE P-VALUE IS GIVEN FOR THE NULL HYPOTHESIS THAT THE TRUE MEAN IS 0.

 ETABAR:         6.1220E-05 -1.4340E-03 -2.3544E-02  0.0000E+00  2.9933E-03 -1.1636E-03 -2.3907E-02  0.0000E+00
 SE:             1.6801E-02  2.3542E-02  5.6391E-03  0.0000E+00  1.2842E-02  1.6510E-02  7.0654E-03  0.0000E+00
 N:                     855         855         855         855         855         855         855         855

 P VAL.:         9.9709E-01  9.5143E-01  2.9797E-05  1.0000E+00  8.1569E-01  9.4381E-01  7.1547E-04  1.0000E+00

 ETASHRINKSD(%)  5.1322E+00  7.4442E+00  5.2853E+01  1.0000E+02  1.6449E+01  1.8839E+01  4.9755E+01  1.0000E+02
 ETASHRINKVR(%)  1.0001E+01  1.4334E+01  7.7772E+01  1.0000E+02  3.0192E+01  3.4129E+01  7.4755E+01  1.0000E+02
 EBVSHRINKSD(%)  5.0262E+00  6.7067E+00  5.4322E+01  0.0000E+00  1.6139E+01  1.7844E+01  5.1382E+01  0.0000E+00
 EBVSHRINKVR(%)  9.7998E+00  1.2964E+01  7.9135E+01  0.0000E+00  2.9674E+01  3.2504E+01  7.6363E+01  0.0000E+00
 EPSSHRINKSD(%)  1.8992E+01  1.0000E+02  1.4056E+01  1.0000E+02
 EPSSHRINKVR(%)  3.4376E+01  1.0000E+02  2.6136E+01  1.0000E+02


 TOTAL DATA POINTS NORMALLY DISTRIBUTED (N):         9261
 N*LOG(2PI) CONSTANT TO OBJECTIVE FUNCTION:    17020.579512016946
 OBJECTIVE FUNCTION VALUE WITHOUT CONSTANT:    161823.33913838991
 OBJECTIVE FUNCTION VALUE WITH CONSTANT:       178843.91865040685
 REPORTED OBJECTIVE FUNCTION DOES NOT CONTAIN CONSTANT

 TOTAL EFFECTIVE ETAS (NIND*NETA):                          4392


 #TERE:
 Elapsed estimation  time in seconds:   639.93
 Elapsed covariance  time in seconds:  1336.82
 Elapsed postprocess time in seconds:     2.66

 ********************               FIRST ORDER CONDITIONAL ESTIMATION WITH INTERACTION              ********************
 #OBJT:**************                       MINIMUM VALUE OF OBJECTIVE FUNCTION                      ********************
 #OBJV:********************************************   161823.339       **************************************************

 ********************               FIRST ORDER CONDITIONAL ESTIMATION WITH INTERACTION              ********************
 ********************                             FINAL PARAMETER ESTIMATE                           ********************

 THETA - VECTOR OF FIXED EFFECTS PARAMETERS   *********
         TH 1      TH 2      TH 3      TH 4      TH 5      TH 6      TH 7      TH 8      TH 9      TH10      TH11      TH12
          TH13      TH14
         1.25E+01  1.58E+01  5.84E+00  1.11E+01  7.02E+00  1.11E+01  6.41E+00  1.04E+01  4.61E-01  3.35E-01  7.46E-01 -2.86E-01
          7.37E-01  7.01E-01

 OMEGA - COV MATRIX FOR RANDOM EFFECTS - ETAS  ********
         ETA1      ETA2      ETA3      ETA4      ETA5      ETA6      ETA7      ETA8
 ETA1
+        2.68E-01
 ETA2
+        2.96E-01  5.54E-01
 ETA3
+        0.00E+00  0.00E+00  1.22E-01
 ETA4
+        0.00E+00  0.00E+00  0.00E+00  0.00E+00
 ETA5
+        0.00E+00  0.00E+00  0.00E+00  0.00E+00  2.02E-01
 ETA6
+        0.00E+00  0.00E+00  0.00E+00  0.00E+00  1.70E-01  3.54E-01
 ETA7
+        0.00E+00  0.00E+00  0.00E+00  0.00E+00  0.00E+00  0.00E+00  1.69E-01
 ETA8
+        0.00E+00  0.00E+00  0.00E+00  0.00E+00  0.00E+00  0.00E+00  0.00E+00  0.00E+00

 SIGMA - COV MATRIX FOR RANDOM EFFECTS - EPSILONS  ****
         EPS1      EPS2      EPS3      EPS4
 EPS1
+        2.58E-02
 EPS2
+        0.00E+00  0.00E+00
 EPS3
+        0.00E+00  0.00E+00  2.34E-02
 EPS4
+        0.00E+00  0.00E+00  0.00E+00  0.00E+00

 OMEGA - CORR MATRIX FOR RANDOM EFFECTS - ETAS  *******
         ETA1      ETA2      ETA3      ETA4      ETA5      ETA6      ETA7      ETA8
 ETA1
+        5.18E-01
 ETA2
+        7.66E-01  7.44E-01
 ETA3
+        0.00E+00  0.00E+00  3.50E-01
 ETA4
+        0.00E+00  0.00E+00  0.00E+00  0.00E+00
 ETA5
+        0.00E+00  0.00E+00  0.00E+00  0.00E+00  4.50E-01
 ETA6
+        0.00E+00  0.00E+00  0.00E+00  0.00E+00  6.34E-01  5.95E-01
 ETA7
+        0.00E+00  0.00E+00  0.00E+00  0.00E+00  0.00E+00  0.00E+00  4.11E-01
 ETA8
+        0.00E+00  0.00E+00  0.00E+00  0.00E+00  0.00E+00  0.00E+00  0.00E+00  0.00E+00

 SIGMA - CORR MATRIX FOR RANDOM EFFECTS - EPSILONS  ***
         EPS1      EPS2      EPS3      EPS4
 EPS1
+        1.61E-01
 EPS2
+        0.00E+00  0.00E+00
 EPS3
+        0.00E+00  0.00E+00  1.53E-01
 EPS4
+        0.00E+00  0.00E+00  0.00E+00  0.00E+00

 ********************               FIRST ORDER CONDITIONAL ESTIMATION WITH INTERACTION              ********************
 ********************                            STANDARD ERROR OF ESTIMATE                          ********************

 THETA - VECTOR OF FIXED EFFECTS PARAMETERS   *********
         TH 1      TH 2      TH 3      TH 4      TH 5      TH 6      TH 7      TH 8      TH 9      TH10      TH11      TH12
          TH13      TH14
         2.52E-01  5.05E-01  2.23E-01  6.80E-01  1.41E-01  3.15E-01  2.40E-01  7.16E-01  4.00E-02  1.05E-01  6.20E-02  2.74E-02
          1.51E-01  1.17E-01

 OMEGA - COV MATRIX FOR RANDOM EFFECTS - ETAS  ********
         ETA1      ETA2      ETA3      ETA4      ETA5      ETA6      ETA7      ETA8
 ETA1
+        2.51E-02
 ETA2
+        3.56E-02  6.43E-02
 ETA3
+       ......... .........  4.01E-02
 ETA4
+       ......... ......... ......... .........
 ETA5
+       ......... ......... ......... .........  2.34E-02
 ETA6
+       ......... ......... ......... .........  2.40E-02  4.21E-02
 ETA7
+       ......... ......... ......... ......... ......... .........  5.13E-02
 ETA8
+       ......... ......... ......... ......... ......... ......... ......... .........

 SIGMA - COV MATRIX FOR RANDOM EFFECTS - EPSILONS  ****
         EPS1      EPS2      EPS3      EPS4
 EPS1
+        1.74E-03
 EPS2
+       ......... .........
 EPS3
+       ......... .........  1.31E-03
 EPS4
+       ......... ......... ......... .........

 OMEGA - CORR MATRIX FOR RANDOM EFFECTS - ETAS  *******
         ETA1      ETA2      ETA3      ETA4      ETA5      ETA6      ETA7      ETA8
 ETA1
+        2.43E-02
 ETA2
+        4.00E-02  4.32E-02
 ETA3
+       ......... .........  5.73E-02
 ETA4
+       ......... ......... ......... .........
 ETA5
+       ......... ......... ......... .........  2.61E-02
 ETA6
+       ......... ......... ......... .........  5.63E-02  3.54E-02
 ETA7
+       ......... ......... ......... ......... ......... .........  6.23E-02
 ETA8
+       ......... ......... ......... ......... ......... ......... ......... .........

 SIGMA - CORR MATRIX FOR RANDOM EFFECTS - EPSILONS  ***
         EPS1      EPS2      EPS3      EPS4
 EPS1
+        5.41E-03
 EPS2
+       ......... .........
 EPS3
+       ......... .........  4.29E-03
 EPS4
+       ......... ......... ......... .........
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
 ********************               FIRST ORDER CONDITIONAL ESTIMATION WITH INTERACTION              ********************
 ********************                      EIGENVALUES OF COR MATRIX OF ESTIMATE                     ********************

             1         2         3         4         5         6         7         8         9        10        11        12
             13        14        15        16        17        18        19        20        21        22        23        24
         1.56E-02  2.79E-02  4.94E-02  8.12E-02  1.24E-01  1.51E-01  1.78E-01  2.52E-01  2.89E-01  3.74E-01  4.15E-01  4.90E-01
          5.92E-01  7.15E-01  7.65E-01  1.02E+00  1.10E+00  1.27E+00  1.61E+00  1.88E+00  2.54E+00  2.63E+00  3.38E+00  4.04E+00
 Elapsed finaloutput time in seconds:    20.50
 #CPUT: Total CPU Time in Seconds,     1996.906
